// TESS Stability Analysis base model

class system
{
    int64 t0;
    double inertia[s];
    double damping[pu];
    double regulation[MW];
    double supply[MW];
    double demand[MW];
    randomvar noise[MW];
    double drift[MW];
    double ramp[MW/h];
    double frequency[Hz];
    double Kp;
    double Ki;
    double Kd;
    double intfreq;
}

class market
{
    double interval[s];
    double price[$/MWh];
    double quantity[MW];
}

class battery
{
    double capacity[MWh];
    double rating[MW];
    double energy[MWh];
    double power[MW];
    double ramp[MW/h];
    double setpoint[MWh];
    double power_ask[$/MWh];
    double power_offer[$/MWh];
}
